# OpenSim document version 40600
Model moco_torque_driven:
  gravity: 0 -9.80665 0
  length_units: meters
  force_units: N
  defaults: CoordinateActuator default: optimal_force=300
  Ground
  BodySet:
    Body pelvis: mass=8.371007 [kg] mass_center=(-0.07392592 0 0) inertia=(0.09432937 0.09432937 0.04467701 0 0 0)
        meshes=(r_pelvis.vtp l_pelvis.vtp sacrum.vtp)
      WrapCylinder Gmax1_at_pelvis_r: xyz_body_rotation=(-0.6 0.45 0) translation=(-0.08051337 -0.1027828 0.07143676)
          quadrant=-x radius=0.04289081 length=0.1672316
      WrapCylinder Gmax2_at_pelvis_r: xyz_body_rotation=(-0.75 0.39 0) translation=(-0.08365026 -0.08617143 0.07963442)
          quadrant=all radius=0.0431465 length=0.1102076
      WrapCylinder Gmax3_at_pelvis_r: xyz_body_rotation=(-0.1 0 0) translation=(-0.08678714 -0.09136248 0.07963442)
          quadrant=all radius=0.04170493 length=0.1169845
      WrapCylinder Gmax1_at_pelvis_l: xyz_body_rotation=(0.6 -0.45 0) translation=(-0.08051337 -0.1027828 -0.07143676)
          quadrant=-x radius=0.04289081 length=0.1672316
      WrapCylinder Gmax2_at_pelvis_l: xyz_body_rotation=(0.75 -0.39 0)
          translation=(-0.08365026 -0.08617143 -0.07963442) quadrant=all radius=0.0431465 length=0.1102076
      WrapCylinder Gmax3_at_pelvis_l: xyz_body_rotation=(0.1 0 0) translation=(-0.08678714 -0.09136248 -0.07963442)
          quadrant=all radius=0.04170493 length=0.1169845
      WrapCylinder PS_at_brim_r: xyz_body_rotation=(-0.25 -0.27 0.1) translation=(-0.07737649 -0.0622926 0.0768238)
          quadrant=-y radius=0.05253201 length=0.1155415
      WrapCylinder PS_at_brim_l: xyz_body_rotation=(0.25 0.27 0.1) translation=(-0.07737649 -0.0622926 -0.0768238)
          quadrant=-y radius=0.05253201 length=0.1155415
      WrapCylinder IL_at_brim_r: xyz_body_rotation=(-0.32 -0.24 0.9) translation=(-0.0742396 -0.06748365 0.08853474)
          quadrant=-y radius=0.05776455 length=0.1152536
      WrapCylinder IL_at_brim_l: xyz_body_rotation=(0.32 0.24 0.9) translation=(-0.0742396 -0.06748365 -0.08853474)
          quadrant=-y radius=0.05776455 length=0.1152536
    Body femur_r: mass=6.611368 mass_center=(0 -0.1607654 0) inertia=(0.08511593 0.02231194 0.0897563 0 0 0)
        meshes=r_femur.vtp
      WrapCylinder Gastroc_at_condyles_r: translation=(0.004728393 -0.3877283 0) quadrant=all radius=0.02364197
          length=0.09456787
      WrapCylinder KnExt_at_fem_r: xyz_body_rotation=(-0.0623366 0.0507601 0)
          translation=(0.00339336 -0.3808551 0.001977518) quadrant=all radius=0.02364197 length=0.09456787
      WrapCylinder AB_at_femshaft_r: xyz_body_rotation=(1.66157 0.186644 0)
          translation=(0.01384795 -0.1064787 0.02209578) quadrant=all radius=0.0156037 length=0.06619751
      WrapCylinder AL_at_femshaft_r: xyz_body_rotation=(1.77711 0.136489 0)
          translation=(0.02906326 -0.2193114 0.0142927) quadrant=all radius=0.01900814 length=0.09456787
      WrapCylinder AMprox_at_femshaft_r: xyz_body_rotation=(1.61126 0.18656 0)
          translation=(0.004901443 -0.06893506 0.02402308) quadrant=all radius=0.01995382 length=0.06619751
      WrapCylinder AMmid_at_femshaft_r: xyz_body_rotation=(1.61139 0.13656 0)
          translation=(0.02176243 -0.151981 0.01946604) quadrant=all radius=0.02023752 length=0.1134814
      WrapCylinder AMdist_at_femshaft_r: xyz_body_rotation=(1.71188 0.186636 0)
          translation=(0.02988959 -0.2465725 0.008855903) quadrant=all radius=0.0206158 length=0.1891357
      WrapCylinder AMisch_at_condyles_r: xyz_body_rotation=(1.71115 -0.463363 0)
          translation=(-0.02142066 -0.356361 -0.00298302) quadrant=all radius=0.03782715 length=0.2269629
      WrapCylinder PECT_at_femshaft_r: xyz_body_rotation=(1.81295 0.276344 0)
          translation=(0.005755145 -0.07991259 0.02878693) quadrant=all radius=0.01418518 length=0.04728393
    Body tibia_r: mass=2.635264 mass_center=(0 -0.192414 0) inertia=(0.03805034 0.003850332 0.03857881 0 0 0)
        meshes=(r_tibia.vtp r_fibula.vtp)
      WrapCylinder GasLat_at_shank_r: xyz_body_rotation=(2.96723 -0.279725 -1.47812)
          translation=(-0.007626481 -0.07626481 -0.003400998) quadrant=-y radius=0.0566833 length=0.1030606
      WrapCylinder GasMed_at_shank_r: xyz_body_rotation=(2.96723 0.0279725 -1.47812)
          translation=(-0.007626481 -0.07626481 -0.003400998) quadrant=-y radius=0.0566833 length=0.1030606
      WrapCylinder GR_at_condyles_r: xyz_body_rotation=(0 -0.4 0) translation=(-0.003091817 -0.02061211 0) quadrant=all
          radius=0.0371018 length=0.1030606
      WrapCylinder SM_at_condyles_r: xyz_body_rotation=(0 -0.1 0) translation=(-0.001030606 -0.02061211 0) quadrant=all
          radius=0.03627731 length=0.1030606
      WrapCylinder ST_at_condyles_r: xyz_body_rotation=(0 -0.2 0) translation=(-0.002061211 -0.02112741 0) quadrant=all
          radius=0.04380073 length=0.1030606
      WrapCylinder BF_at_gastroc_r: translation=(-0.05977512 -0.06183633 0) quadrant=y radius=0.03091817
          length=0.1545908
    Body talus_r: mass=0.07107928 mass_center=(0 0 0) inertia=(0.001053089 0.0008684676 0.0008684676 0 0 0)
        meshes=r_talus.vtp
    Body calcn_r: mass=0.888491 mass_center=(0.09808616 0.04531432 0)
        inertia=(0.001474324 0.002925471 0.002925471 0 0 0) meshes=r_foot.vtp
    Body toes_r: mass=0.1539577 mass_center=(0.03393781 0.009062865 -0.01716508)
        inertia=(0.0001053089 0.0001552314 0.0001552314 0 0 0) meshes=r_bofoot.vtp
    Body femur_l: mass=6.611368 mass_center=(0 -0.1607654 0) inertia=(0.08511593 0.02231194 0.0897563 0 0 0)
        meshes=l_femur.vtp
      WrapCylinder Gastroc_at_condyles_l: translation=(0.004728393 -0.3877283 0) quadrant=all radius=0.02364197
          length=0.09456787
      WrapCylinder KnExt_at_fem_l: xyz_body_rotation=(0.0623366 -0.0507601 0)
          translation=(0.00339336 -0.3808551 -0.001977518) quadrant=all radius=0.02364197 length=0.09456787
      WrapCylinder AB_at_femshaft_l: xyz_body_rotation=(-1.66157 -0.186644 0)
          translation=(0.01384795 -0.1064787 -0.02209578) quadrant=all radius=0.0156037 length=0.06619751
      WrapCylinder AL_at_femshaft_l: xyz_body_rotation=(-1.77711 -0.136489 0)
          translation=(0.02906326 -0.2193114 -0.0142927) quadrant=all radius=0.01900814 length=0.09456787
      WrapCylinder AMprox_at_femshaft_l: xyz_body_rotation=(-1.61126 -0.18656 0)
          translation=(0.004901443 -0.06893506 -0.02402308) quadrant=all radius=0.01995382 length=0.06619751
      WrapCylinder AMmid_at_femshaft_l: xyz_body_rotation=(-1.61139 -0.13656 0)
          translation=(0.02176243 -0.151981 -0.01946604) quadrant=all radius=0.02023752 length=0.1134814
      WrapCylinder AMdist_at_femshaft_l: xyz_body_rotation=(-1.71188 -0.186636 0)
          translation=(0.02988959 -0.2465725 -0.008855903) quadrant=all radius=0.0206158 length=0.1891357
      WrapCylinder AMisch_at_condyles_l: xyz_body_rotation=(-1.71115 0.463363 0)
          translation=(-0.02142066 -0.356361 0.00298302) quadrant=all radius=0.03782715 length=0.2269629
      WrapCylinder PECT_at_femshaft_l: xyz_body_rotation=(-1.81295 -0.276344 0)
          translation=(0.005755145 -0.07991259 -0.02878693) quadrant=all radius=0.01418518 length=0.04728393
    Body tibia_l: mass=2.635264 mass_center=(0 -0.192414 0) inertia=(0.03805034 0.003850332 0.03857881 0 0 0)
        meshes=(l_tibia.vtp l_fibula.vtp)
      WrapCylinder GasLat_at_shank_l: xyz_body_rotation=(-2.96723 0.279725 -1.47812)
          translation=(-0.007626481 -0.07626481 0.003400998) quadrant=-y radius=0.0566833 length=0.1030606
      WrapCylinder GasMed_at_shank_l: xyz_body_rotation=(-2.96723 -0.0279725 -1.47812)
          translation=(-0.007626481 -0.07626481 0.003400998) quadrant=-y radius=0.0566833 length=0.1030606
      WrapCylinder GR_at_condyles_l: xyz_body_rotation=(0 0.4 0) translation=(-0.003091817 -0.02061211 0) quadrant=all
          radius=0.0371018 length=0.1030606
      WrapCylinder SM_at_condyles_l: xyz_body_rotation=(0 0.1 0) translation=(-0.001030606 -0.02061211 0) quadrant=all
          radius=0.03627731 length=0.1030606
      WrapCylinder ST_at_condyles_l: xyz_body_rotation=(0 0.2 0) translation=(-0.002061211 -0.02112741 0) quadrant=all
          radius=0.04380073 length=0.1030606
      WrapCylinder BF_at_gastroc_l: translation=(-0.05977512 -0.06183633 0) quadrant=all radius=0.03091817
          length=0.1545908
    Body talus_l: mass=0.07107928 mass_center=(0 0 0) inertia=(0.001053089 0.0008684676 0.0008684676 0 0 0)
        meshes=l_talus.vtp
    Body calcn_l: mass=0.888491 mass_center=(0.09808616 0.04531432 0)
        inertia=(0.001474324 0.002925471 0.002925471 0 0 0) meshes=l_foot.vtp
    Body toes_l: mass=0.1539577 mass_center=(0.03393781 0.009062865 0.01716508)
        inertia=(0.0001053089 0.0001552314 0.0001552314 0 0 0) meshes=l_bofoot.vtp
    Body torso: mass=24.33513 mass_center=(-0.03481475 0.2692358 0) inertia=(0.9134465 0.723205 0.9134465 0 0 0)
        meshes=(hat_spine.vtp hat_jaw.vtp hat_skull.vtp hat_ribs_scap.vtp)
  JointSet:
    CustomJoint ground_pelvis: socket_parent_frame=ground_offset socket_child_frame=pelvis_offset
      Coordinate pelvis_tilt: default_value=0 range=(-1.570796 1.570796) clamped=true
      Coordinate pelvis_list: default_value=0 range=(-1.570796 1.570796) clamped=true
      Coordinate pelvis_rotation: default_value=0 range=(-1.570796 1.570796) clamped=true
      Coordinate pelvis_tx: default_value=0 range=(-5 5) clamped=true
      Coordinate pelvis_ty: default_value=0.93 range=(-1 2) clamped=true
      Coordinate pelvis_tz: default_value=0 range=(-3 3) clamped=true
      PhysicalOffsetFrame ground_offset: socket_parent=/ground translation=(0 0 0) [meters]
      PhysicalOffsetFrame pelvis_offset: socket_parent=/bodyset/pelvis translation=(0 0 0)
      SpatialTransform:
        TransformAxis rotation1: coordinates=pelvis_tilt axis=(0 0 1) LinearFunction(coefficients=1 0)
        TransformAxis rotation2: coordinates=pelvis_list axis=(1 0 0) LinearFunction(coefficients=1 0)
        TransformAxis rotation3: coordinates=pelvis_rotation axis=(0 1 0) LinearFunction(coefficients=1 0)
        TransformAxis translation1: coordinates=pelvis_tx axis=(1 0 0) LinearFunction(coefficients=1 0)
        TransformAxis translation2: coordinates=pelvis_ty axis=(0 1 0) LinearFunction(coefficients=1 0)
        TransformAxis translation3: coordinates=pelvis_tz axis=(0 0 1) LinearFunction(coefficients=1 0)
    CustomJoint hip_r: socket_parent_frame=pelvis_offset socket_child_frame=femur_r_offset
      Coordinate hip_flexion_r: default_value=0 range=(-0.5235988 2.094395) clamped=true
      Coordinate hip_adduction_r: default_value=0 range=(-0.8726646 0.5235988) clamped=true
      Coordinate hip_rotation_r: default_value=0 range=(-0.6981317 0.6981317) clamped=true
      PhysicalOffsetFrame pelvis_offset: socket_parent=/bodyset/pelvis translation=(-0.05884377 -0.08148911 0.09047876)
      PhysicalOffsetFrame femur_r_offset: socket_parent=/bodyset/femur_r translation=(0 0 0)
      SpatialTransform: axes_held_at_zero=(translation1 translation2 translation3)
        TransformAxis rotation1: coordinates=hip_flexion_r axis=(0 0 1) LinearFunction(coefficients=1 0)
        TransformAxis rotation2: coordinates=hip_adduction_r axis=(1 0 0) LinearFunction(coefficients=1 0)
        TransformAxis rotation3: coordinates=hip_rotation_r axis=(0 1 0) LinearFunction(coefficients=1 0)
    CustomJoint walker_knee_r: socket_parent_frame=femur_r_offset socket_child_frame=tibia_r_offset
      Coordinate knee_angle_r: default_value=0 range=(0 2.0944) clamped=true
      PhysicalOffsetFrame femur_r_offset: socket_parent=/bodyset/femur_r
          translation=(-0.007650541 -0.3857991 -0.002600616) orientation=(-1.64157 1.44618 1.5708) [radians]
      PhysicalOffsetFrame tibia_r_offset: socket_parent=/bodyset/tibia_r
          translation=(-0.008337125 -0.003642984 -0.001530181) orientation=(-1.64157 1.44618 1.5708)
      SpatialTransform: axes_held_at_zero=translation3
        TransformAxis rotation1: coordinates=knee_angle_r axis=(1 0 0) LinearFunction(coefficients=1 0)
        TransformAxis rotation2: coordinates=knee_angle_r axis=(0 0 1)
          SimmSpline: x=(0 0.174533 0.349066 0.523599 0.698132 0.872665 1.0472 1.22173 1.39626 1.5708 1.74533 1.91986 2.0944)
              y=(0 0.0126809 0.0226969 0.0296054 0.0332049 0.0335354 0.0308779 0.0257548 0.0189295 0.011407 0.00443314 -0.00050475 -0.0016782)
        TransformAxis rotation3: coordinates=knee_angle_r axis=(0 1 0)
          SimmSpline: x=(0 0.174533 0.349066 0.523599 0.698132 0.872665 1.0472 1.22173 1.39626 1.5708 1.74533 1.91986 2.0944)
              y=(0 0.059461 0.109399 0.150618 0.18392 0.210107 0.229983 0.24435 0.254012 0.25977 0.262428 0.262788 0.261654)
        TransformAxis translation1: coordinates=knee_angle_r axis=(0 1 0)
          MultiplierFunction: scale=0.9456787
            SimmSpline: x=(0 0.174533 0.349066 0.523599 0.698132 0.872665 1.0472 1.22173 1.39626 1.5708 1.74533 1.91986 2.0944)
                y=(0 0.000479 0.000835 0.001086 0.001251 0.001346 0.001391 0.001403 0.0014 0.0014 0.001421 0.001481 0.001599)
        TransformAxis translation2: coordinates=knee_angle_r axis=(0 0 1)
          MultiplierFunction: scale=0.9456787
            SimmSpline: x=(0 0.174533 0.349066 0.523599 0.698132 0.872665 1.0472 1.22173 1.39626 1.5708 1.74533 1.91986 2.0944)
                y=(0 0.000988 0.001899 0.002734 0.003492 0.004173 0.004777 0.005305 0.005756 0.00613 0.006427 0.006648 0.006792)
    PinJoint ankle_r: socket_parent_frame=tibia_r_offset socket_child_frame=talus_r_offset
      Coordinate ankle_angle_r: default_value=0 range=(-0.6981317 0.5235988) clamped=true
      PhysicalOffsetFrame tibia_r_offset: socket_parent=/bodyset/tibia_r translation=(-0.01030606 -0.4122422 0)
          orientation=(0.175895 -0.105208 0.0186622)
      PhysicalOffsetFrame talus_r_offset: socket_parent=/bodyset/talus_r translation=(0 0 0)
          orientation=(0.175895 -0.105208 0.0186622)
    PinJoint subtalar_r: socket_parent_frame=talus_r_offset socket_child_frame=calcn_r_offset
      Coordinate subtalar_angle_r: default_value=0 range=(-0.3490659 0.3490659) clamped=true
      PhysicalOffsetFrame talus_r_offset: socket_parent=/bodyset/talus_r
          translation=(-0.04783662 -0.06336453 0.007768424) orientation=(-1.76819 0.906223 1.8196)
      PhysicalOffsetFrame calcn_r_offset: socket_parent=/bodyset/calcn_r translation=(0 0 0)
          orientation=(-1.76819 0.906223 1.8196)
    PinJoint mtp_r: socket_parent_frame=calcn_r_offset socket_child_frame=toes_r_offset
      Coordinate mtp_angle_r: default_value=0 range=(-1.396263 0.5235988) clamped=true
      PhysicalOffsetFrame calcn_r_offset: socket_parent=/bodyset/calcn_r
          translation=(0.1753781 -0.003020955 0.001059331) orientation=(-3.14159 0.619901 0)
      PhysicalOffsetFrame toes_r_offset: socket_parent=/bodyset/toes_r translation=(0 0 0)
          orientation=(-3.14159 0.619901 0)
    CustomJoint hip_l: socket_parent_frame=pelvis_offset socket_child_frame=femur_l_offset
      Coordinate hip_flexion_l: default_value=0 range=(-0.5235988 2.094395) clamped=true
      Coordinate hip_adduction_l: default_value=0 range=(-0.8726646 0.5235988) clamped=true
      Coordinate hip_rotation_l: default_value=0 range=(-0.6981317 0.6981317) clamped=true
      PhysicalOffsetFrame pelvis_offset: socket_parent=/bodyset/pelvis
          translation=(-0.05884377 -0.08148911 -0.09047876)
      PhysicalOffsetFrame femur_l_offset: socket_parent=/bodyset/femur_l translation=(0 0 0)
      SpatialTransform: axes_held_at_zero=(translation1 translation2 translation3)
        TransformAxis rotation1: coordinates=hip_flexion_l axis=(0 0 1) LinearFunction(coefficients=1 0)
        TransformAxis rotation2: coordinates=hip_adduction_l axis=(1 0 0) LinearFunction(coefficients=-1 0)
        TransformAxis rotation3: coordinates=hip_rotation_l axis=(0 1 0) LinearFunction(coefficients=-1 0)
    CustomJoint walker_knee_l: socket_parent_frame=femur_l_offset socket_child_frame=tibia_l_offset
      Coordinate knee_angle_l: default_value=0 range=(0 2.0944) clamped=true
      PhysicalOffsetFrame femur_l_offset: socket_parent=/bodyset/femur_l
          translation=(-0.007650541 -0.3857991 0.002600616) orientation=(1.64157 -1.44618 1.5708)
      PhysicalOffsetFrame tibia_l_offset: socket_parent=/bodyset/tibia_l
          translation=(-0.008337125 -0.003642984 0.001530181) orientation=(1.64157 -1.44618 1.5708)
      SpatialTransform: axes_held_at_zero=translation3
        TransformAxis rotation1: coordinates=knee_angle_l axis=(-1 0 0) LinearFunction(coefficients=1 0)
        TransformAxis rotation2: coordinates=knee_angle_l axis=(0 0 1)
          SimmSpline: x=(0 0.174533 0.349066 0.523599 0.698132 0.872665 1.0472 1.22173 1.39626 1.5708 1.74533 1.91986 2.0944)
              y=(0 0.0126809 0.0226969 0.0296054 0.0332049 0.0335354 0.0308779 0.0257548 0.0189295 0.011407 0.00443314 -0.00050475 -0.0016782)
        TransformAxis rotation3: coordinates=knee_angle_l axis=(0 1 0)
          SimmSpline: x=(0 0.174533 0.349066 0.523599 0.698132 0.872665 1.0472 1.22173 1.39626 1.5708 1.74533 1.91986 2.0944)
              y=(0 -0.059461 -0.109399 -0.150618 -0.18392 -0.210107 -0.229983 -0.24435 -0.254012 -0.25977 -0.262428 -0.262788 -0.261654)
        TransformAxis translation1: coordinates=knee_angle_l axis=(0 1 0)
          MultiplierFunction: scale=0.9456787
            SimmSpline: x=(0 0.174533 0.349066 0.523599 0.698132 0.872665 1.0472 1.22173 1.39626 1.5708 1.74533 1.91986 2.0944)
                y=(0 0.000479 0.000835 0.001086 0.001251 0.001346 0.001391 0.001403 0.0014 0.0014 0.001421 0.001481 0.001599)
        TransformAxis translation2: coordinates=knee_angle_l axis=(0 0 1)
          MultiplierFunction: scale=0.9456787
            SimmSpline: x=(0 0.174533 0.349066 0.523599 0.698132 0.872665 1.0472 1.22173 1.39626 1.5708 1.74533 1.91986 2.0944)
                y=(0 -0.000988 -0.001899 -0.002734 -0.003492 -0.004173 -0.004777 -0.005305 -0.005756 -0.00613 -0.006427 -0.006648 -0.006792)
    PinJoint ankle_l: socket_parent_frame=tibia_l_offset socket_child_frame=talus_l_offset
      Coordinate ankle_angle_l: default_value=0 range=(-0.6981317 0.5235988) clamped=true
      PhysicalOffsetFrame tibia_l_offset: socket_parent=/bodyset/tibia_l translation=(-0.01030606 -0.4122422 0)
          orientation=(-0.175895 0.105208 0.0186622)
      PhysicalOffsetFrame talus_l_offset: socket_parent=/bodyset/talus_l translation=(0 0 0)
          orientation=(-0.175895 0.105208 0.0186622)
    PinJoint subtalar_l: socket_parent_frame=talus_l_offset socket_child_frame=calcn_l_offset
      Coordinate subtalar_angle_l: default_value=0 range=(-0.3490659 0.3490659) clamped=true
      PhysicalOffsetFrame talus_l_offset: socket_parent=/bodyset/talus_l
          translation=(-0.04783662 -0.06336453 -0.007768424) orientation=(1.76819 -0.906223 1.8196)
      PhysicalOffsetFrame calcn_l_offset: socket_parent=/bodyset/calcn_l translation=(0 0 0)
          orientation=(1.76819 -0.906223 1.8196)
    PinJoint mtp_l: socket_parent_frame=calcn_l_offset socket_child_frame=toes_l_offset
      Coordinate mtp_angle_l: default_value=0 range=(-1.396263 0.5235988) clamped=true
      PhysicalOffsetFrame calcn_l_offset: socket_parent=/bodyset/calcn_l
          translation=(0.1753781 -0.003020955 -0.001059331) orientation=(-3.14159 -0.619901 0)
      PhysicalOffsetFrame toes_l_offset: socket_parent=/bodyset/toes_l translation=(0 0 0)
          orientation=(-3.14159 -0.619901 0)
    CustomJoint back: socket_parent_frame=pelvis_offset socket_child_frame=torso_offset
      Coordinate lumbar_extension: default_value=0 range=(-1.570796 1.570796) clamped=true
      Coordinate lumbar_bending: default_value=0 range=(-1.570796 1.570796) clamped=true
      Coordinate lumbar_rotation: default_value=0 range=(-1.570796 1.570796) clamped=true
      PhysicalOffsetFrame pelvis_offset: socket_parent=/bodyset/pelvis translation=(-0.1052948 0.08461412 0)
      PhysicalOffsetFrame torso_offset: socket_parent=/bodyset/torso translation=(0 0 0)
      SpatialTransform: axes_held_at_zero=(translation1 translation2 translation3)
        TransformAxis rotation1: coordinates=lumbar_extension axis=(0 0 1) LinearFunction(coefficients=1 0)
        TransformAxis rotation2: coordinates=lumbar_bending axis=(1 0 0) LinearFunction(coefficients=1 0)
        TransformAxis rotation3: coordinates=lumbar_rotation axis=(0 1 0) LinearFunction(coefficients=1 0)
  ForceSet:
    CoordinateActuator [values shared by the 23 below unless stated]: min_control=-1 max_control=1 optimal_force=200
    CoordinateActuator pelvis_tilt_residual: coordinate=pelvis_tilt optimal_force=1
    CoordinateActuator pelvis_list_residual: coordinate=pelvis_list optimal_force=1
    CoordinateActuator pelvis_rotation_residual: coordinate=pelvis_rotation optimal_force=1
    CoordinateActuator pelvis_tx_residual: coordinate=pelvis_tx optimal_force=1
    CoordinateActuator pelvis_ty_residual: coordinate=pelvis_ty optimal_force=1
    CoordinateActuator pelvis_tz_residual: coordinate=pelvis_tz optimal_force=1
    CoordinateActuator hip_flexion_r_reserve: coordinate=hip_flexion_r
    CoordinateActuator hip_adduction_r_reserve: coordinate=hip_adduction_r
    CoordinateActuator hip_rotation_r_reserve: coordinate=hip_rotation_r
    CoordinateActuator knee_angle_r_reserve: coordinate=knee_angle_r
    CoordinateActuator ankle_angle_r_reserve: coordinate=ankle_angle_r
    CoordinateActuator subtalar_angle_r_reserve: coordinate=subtalar_angle_r
    CoordinateActuator mtp_angle_r_reserve: coordinate=mtp_angle_r
    CoordinateActuator hip_flexion_l_reserve: coordinate=hip_flexion_l
    CoordinateActuator hip_adduction_l_reserve: coordinate=hip_adduction_l
    CoordinateActuator hip_rotation_l_reserve: coordinate=hip_rotation_l
    CoordinateActuator knee_angle_l_reserve: coordinate=knee_angle_l
    CoordinateActuator ankle_angle_l_reserve: coordinate=ankle_angle_l
    CoordinateActuator subtalar_angle_l_reserve: coordinate=subtalar_angle_l
    CoordinateActuator mtp_angle_l_reserve: coordinate=mtp_angle_l
    CoordinateActuator lumbar_extension_reserve: coordinate=lumbar_extension
    CoordinateActuator lumbar_bending_reserve: coordinate=lumbar_bending
    CoordinateActuator lumbar_rotation_reserve: coordinate=lumbar_rotation
    SmoothSphereHalfSpaceForce [values shared by the 16 below unless stated]: socket_half_space=/contactgeometryset/floor
        stiffness=3000000 [N/m^2] dissipation=2 [s/m] static_friction=0.8 dynamic_friction=0.8 viscous_friction=0.5
        transition_velocity=0.2 [m/s] constant_contact_force=1e-5 [N] hertz_smoothing=300 hunt_crossley_smoothing=50
    SmoothSphereHalfSpaceForce floor_s01_r: socket_sphere=/contactgeometryset/s01_r
    SmoothSphereHalfSpaceForce floor_s02_r: socket_sphere=/contactgeometryset/s02_r
    SmoothSphereHalfSpaceForce floor_s03_r: socket_sphere=/contactgeometryset/s03_r
    SmoothSphereHalfSpaceForce floor_s04_r: socket_sphere=/contactgeometryset/s04_r
    SmoothSphereHalfSpaceForce floor_s05_r: socket_sphere=/contactgeometryset/s05_r
    SmoothSphereHalfSpaceForce floor_s06_r: socket_sphere=/contactgeometryset/s06_r
    SmoothSphereHalfSpaceForce floor_s07_r: socket_sphere=/contactgeometryset/s07_r
    SmoothSphereHalfSpaceForce floor_s08_r: socket_sphere=/contactgeometryset/s08_r
    SmoothSphereHalfSpaceForce floor_s09_r: socket_sphere=/contactgeometryset/s09_r
    SmoothSphereHalfSpaceForce floor_s10_r: socket_sphere=/contactgeometryset/s10_r
    SmoothSphereHalfSpaceForce floor_s11_r: socket_sphere=/contactgeometryset/s11_r
    SmoothSphereHalfSpaceForce floor_s12_r: socket_sphere=/contactgeometryset/s12_r
    SmoothSphereHalfSpaceForce floor_s13_r: socket_sphere=/contactgeometryset/s13_r
    SmoothSphereHalfSpaceForce floor_s14_r: socket_sphere=/contactgeometryset/s14_r
    SmoothSphereHalfSpaceForce floor_s15_r: socket_sphere=/contactgeometryset/s15_r
    SmoothSphereHalfSpaceForce floor_s16_r: socket_sphere=/contactgeometryset/s16_r
  MarkerSet:
    Marker R.Shoulder: torso (0 0.3516892 0.1647898) fixed=true
    Marker L.Shoulder: torso (0 0.3516892 -0.1647898) fixed=true
    Marker R.Clavicle: torso (0.05338261 0.3239243 0.02901229) fixed=true
    Marker L.Clavicle: torso (0.05338261 0.3239243 -0.02901229) fixed=true
    Marker R.ASIS: pelvis (0.01359317 0.00311463 0.1499001) fixed=true
    Marker L.ASIS: pelvis (0.01359317 0.00311463 -0.1499001) fixed=true
    Marker S2: pelvis (-0.1882131 0.02595525 0) fixed=true
    Marker R.PSIS: pelvis (-0.1624344 0.0309674 0.04153466)
    Marker L.PSIS: pelvis (-0.1645468 0.03633749 -0.0513201)
    Marker R_HJC: femur_r (0 0 0) fixed=true
    Marker L_HJC: femur_l (0 0 0) fixed=true
    Marker R.TH1: femur_r (0.02775411 -0.1365102 0.0903398)
    Marker R.TH2: femur_r (-0.06997831 -0.1453774 0.05237545)
    Marker R.TH3: femur_r (-0.06821624 -0.2751238 0.03937016)
    Marker R.Knee: femur_r (0 -0.3820542 0.0444469) fixed=true
    Marker R.MKnee: femur_r (0.004728393 -0.3792172 -0.04728393) fixed=true
    Marker R.SH1: tibia_r (0.0006017172 -0.08300908 0.05727722)
    Marker R.SH2: tibia_r (-0.003521689 -0.1917335 0.0822396)
    Marker R.SH3: tibia_r (-0.08039069 -0.08785341 0.04081473)
    Marker R.SH4: tibia_r (-0.08067401 -0.2085197 0.05123566)
    Marker R.Ankle: tibia_r (-0.006968764 -0.392225 0.05271994)
    Marker R.MAnkle: tibia_r (0.006183633 -0.3903934 -0.03916301) fixed=true
    Marker R.Toe: calcn_r (0.2084271 0.06250475 -0.0001278334)
    Marker R.MT5: calcn_r (0.1669961 0.02723728 0.06126144)
    Marker R.Heel: calcn_r (-0.009719574 0.0420243 0.002855857)
    Marker L.TH1: femur_l (0.03814275 -0.08661044 -0.0894233)
    Marker L.TH2: femur_l (0.04478048 -0.2178012 -0.06776629)
    Marker L.TH3: femur_l (-0.0680416 -0.08103937 -0.08557444)
    Marker L.TH4: femur_l (-0.07112215 -0.2137561 -0.05004009)
    Marker L.Knee: femur_l (0 -0.3820542 -0.0444469) fixed=true
    Marker L.MKnee: femur_l (0.004728393 -0.3792172 0.04728393) fixed=true
    Marker L.SH1: tibia_l (0.02203067 -0.08291017 -0.04103734)
    Marker L.SH2: tibia_l (-0.07128582 -0.07908458 -0.05154603)
    Marker L.SH3: tibia_l (-0.06702403 -0.1958186 -0.06457565)
    Marker L.Ankle: tibia_l (-0.004319593 -0.3868503 -0.05138765)
    Marker L.MAnkle: tibia_l (0.006183633 -0.3903934 0.03916301) fixed=true
    Marker L.Toe: calcn_l (0.2118537 0.05600252 -0.0044213)
    Marker L.Heel: calcn_l (-0.008649976 0.03956839 0.003991748)
    Marker L.MT5: calcn_l (0.1650043 0.02689086 -0.06193001)
    Marker MidPSIS: pelvis (-0.1610267 0.03945198 0) fixed=true
    Marker MidASIS: pelvis (0.01359317 0.00311463 0) fixed=true
    Marker MidClavicle: torso (0.05338261 0.3239243 0) fixed=true
    Marker L.AnkleJoint: tibia_l (0.0005153028 -0.3903934 -0.007729541) fixed=true
    Marker L.KneeJoint: femur_l (0.002364197 -0.3806357 0.001418518) fixed=true
    Marker L.HeelGround: calcn_l (-0.01961723 -0.007552387 0.009808616) fixed=true
    Marker L.MT5Ground: calcn_l (0.1569379 -0.007552387 -0.04904308) fixed=true
    Marker L.ToeGround: calcn_l (0.2255982 -0.007552387 0.01569379) fixed=true
    Marker L.AnkleJointGround: tibia_l (0.0005153028 -0.4606291 -0.007729541) fixed=true
    Marker R.AnkleJoint: tibia_r (0.0005153028 -0.3903934 0.007729541) fixed=true
    Marker R.KneeJoint: femur_r (0.002364197 -0.3806357 -0.001418518) fixed=true
    Marker R.HeelGround: calcn_r (-0.01961723 -0.007552387 -0.009808616) fixed=true
    Marker R.MT5Ground: calcn_r (0.1569379 -0.007552387 0.04904308) fixed=true
    Marker R.ToeGround: calcn_r (0.2255982 -0.007552387 -0.01569379) fixed=true
    Marker R.AnkleJointGround: tibia_r (0.0005153028 -0.4606291 0.007729541) fixed=true
  ContactGeometrySet:
    ContactHalfSpace floor: socket_frame=/ground location=(0.5 0 -0.25) orientation=(0 0 -1.570796)
    ContactSphere [values shared by the 16 below unless stated]: socket_frame=/bodyset/calcn_r radius=0.01
    ContactSphere s01_r: location=(0 -0.004 -0.01)
    ContactSphere s02_r: location=(0.02 -0.004 -0.02)
    ContactSphere s03_r: location=(0.025 -0.004 0.007)
    ContactSphere s04_r: location=(0.05 -0.004 -0.022)
    ContactSphere s05_r: location=(0.09 -0.004 -0.025)
    ContactSphere s06_r: location=(0.075 -0.004 0)
    ContactSphere s07_r: location=(0.055 -0.004 0.017)
    ContactSphere s08_r: location=(0.13 -0.004 -0.027)
    ContactSphere s09_r: location=(0.12 -0.004 0.005)
    ContactSphere s10_r: location=(0.09 -0.004 0.03)
    ContactSphere s11_r: location=(0.17 -0.004 -0.03)
    ContactSphere s12_r: location=(0.155 -0.004 0.01)
    ContactSphere s13_r: location=(0.13 -0.004 0.04)
    ContactSphere s14_r: socket_frame=/bodyset/toes_r location=(0.03 0 -0.015)
    ContactSphere s15_r: socket_frame=/bodyset/toes_r location=(0.03 0 0.015)
    ContactSphere s16_r: socket_frame=/bodyset/toes_r location=(0 0 0.035)
